ExampleWing
#Mach
0.0
#IYsym   IZsym   Zsym
 0       0       0.0
#Sref    Cref    Bref
0.14900    0.13647   1.09179
#Xref    Yref    Zref
 0       0       0
#
#
#====================================================================
SURFACE
Wing
#Nchordwise  Cspace   Nspanwise   Sspace
10            1.0      100          1.0
#
ANGLE
0.0
#-------------------------------------------------------------
SECTION
#Xle    Yle    Zle     Chord   Ainc  Nspanwise  Sspace
-0.01598    -0.54453    0.00000   0.01997   3.71433   0.00000   0.00000
#-------------------------------------------------------------
SECTION
#Xle    Yle    Zle     Chord   Ainc  Nspanwise  Sspace
-0.01677    -0.54425    0.00000   0.02096   3.71507   0.00000   0.00000
#-------------------------------------------------------------
SECTION
#Xle    Yle    Zle     Chord   Ainc  Nspanwise  Sspace
-0.01915    -0.54343    0.00000   0.02394   3.71728   0.00000   0.00000
#-------------------------------------------------------------
SECTION
#Xle    Yle    Zle     Chord   Ainc  Nspanwise  Sspace
-0.02311    -0.54206    0.00000   0.02889   3.72098   0.00000   0.00000
#-------------------------------------------------------------
SECTION
#Xle    Yle    Zle     Chord   Ainc  Nspanwise  Sspace
-0.02741    -0.54015    0.00000   0.03427   3.72616   0.00000   0.00000
#-------------------------------------------------------------
SECTION
#Xle    Yle    Zle     Chord   Ainc  Nspanwise  Sspace
-0.03216    -0.53769    0.00000   0.04020   3.73281   0.00000   0.00000
#-------------------------------------------------------------
SECTION
#Xle    Yle    Zle     Chord   Ainc  Nspanwise  Sspace
-0.03707    -0.53469    0.00000   0.04633   3.74093   0.00000   0.00000
#-------------------------------------------------------------
SECTION
#Xle    Yle    Zle     Chord   Ainc  Nspanwise  Sspace
-0.04206    -0.53115    0.00000   0.05257   3.75053   0.00000   0.00000
#-------------------------------------------------------------
SECTION
#Xle    Yle    Zle     Chord   Ainc  Nspanwise  Sspace
-0.04699    -0.52708    0.00000   0.05874   3.76160   0.00000   0.00000
#-------------------------------------------------------------
SECTION
#Xle    Yle    Zle     Chord   Ainc  Nspanwise  Sspace
-0.05193    -0.52247    0.00000   0.06491   3.77413   0.00000   0.00000
#-------------------------------------------------------------
SECTION
#Xle    Yle    Zle     Chord   Ainc  Nspanwise  Sspace
-0.05677    -0.51734    0.00000   0.07096   3.78813   0.00000   0.00000
#-------------------------------------------------------------
SECTION
#Xle    Yle    Zle     Chord   Ainc  Nspanwise  Sspace
-0.06152    -0.51169    0.00000   0.07690   3.80358   0.00000   0.00000
#-------------------------------------------------------------
SECTION
#Xle    Yle    Zle     Chord   Ainc  Nspanwise  Sspace
-0.06615    -0.50552    0.00000   0.08268   3.82049   0.00000   0.00000
#-------------------------------------------------------------
SECTION
#Xle    Yle    Zle     Chord   Ainc  Nspanwise  Sspace
-0.07065    -0.49885    0.00000   0.08831   3.83884   0.00000   0.00000
#-------------------------------------------------------------
SECTION
#Xle    Yle    Zle     Chord   Ainc  Nspanwise  Sspace
-0.07501    -0.49167    0.00000   0.09376   3.85863   0.00000   0.00000
#-------------------------------------------------------------
SECTION
#Xle    Yle    Zle     Chord   Ainc  Nspanwise  Sspace
-0.07922    -0.48400    0.00000   0.09902   3.87986   0.00000   0.00000
#-------------------------------------------------------------
SECTION
#Xle    Yle    Zle     Chord   Ainc  Nspanwise  Sspace
-0.08325    -0.47584    0.00000   0.10407   3.90251   0.00000   0.00000
#-------------------------------------------------------------
SECTION
#Xle    Yle    Zle     Chord   Ainc  Nspanwise  Sspace
-0.08712    -0.46720    0.00000   0.10890   3.92657   0.00000   0.00000
#-------------------------------------------------------------
SECTION
#Xle    Yle    Zle     Chord   Ainc  Nspanwise  Sspace
-0.09080    -0.45809    0.00000   0.11350   3.95204   0.00000   0.00000
#-------------------------------------------------------------
SECTION
#Xle    Yle    Zle     Chord   Ainc  Nspanwise  Sspace
-0.09430    -0.44852    0.00000   0.11787   3.97889   0.00000   0.00000
#-------------------------------------------------------------
SECTION
#Xle    Yle    Zle     Chord   Ainc  Nspanwise  Sspace
-0.09760    -0.43849    0.00000   0.12200   4.00712   0.00000   0.00000
#-------------------------------------------------------------
SECTION
#Xle    Yle    Zle     Chord   Ainc  Nspanwise  Sspace
-0.10071    -0.42803    0.00000   0.12589   4.03671   0.00000   0.00000
#-------------------------------------------------------------
SECTION
#Xle    Yle    Zle     Chord   Ainc  Nspanwise  Sspace
-0.10362    -0.41713    0.00000   0.12953   4.06764   0.00000   0.00000
#-------------------------------------------------------------
SECTION
#Xle    Yle    Zle     Chord   Ainc  Nspanwise  Sspace
-0.10633    -0.40582    0.00000   0.13292   4.09989   0.00000   0.00000
#-------------------------------------------------------------
SECTION
#Xle    Yle    Zle     Chord   Ainc  Nspanwise  Sspace
-0.10885    -0.39409    0.00000   0.13606   4.13344   0.00000   0.00000
#-------------------------------------------------------------
SECTION
#Xle    Yle    Zle     Chord   Ainc  Nspanwise  Sspace
-0.11116    -0.38197    0.00000   0.13895   4.16827   0.00000   0.00000
#-------------------------------------------------------------
SECTION
#Xle    Yle    Zle     Chord   Ainc  Nspanwise  Sspace
-0.11327    -0.36947    0.00000   0.14159   4.20435   0.00000   0.00000
#-------------------------------------------------------------
SECTION
#Xle    Yle    Zle     Chord   Ainc  Nspanwise  Sspace
-0.11518    -0.35659    0.00000   0.14398   4.24164   0.00000   0.00000
#-------------------------------------------------------------
SECTION
#Xle    Yle    Zle     Chord   Ainc  Nspanwise  Sspace
-0.11690    -0.34335    0.00000   0.14613   4.28012   0.00000   0.00000
#-------------------------------------------------------------
SECTION
#Xle    Yle    Zle     Chord   Ainc  Nspanwise  Sspace
-0.11843    -0.32977    0.00000   0.14804   4.31974   0.00000   0.00000
#-------------------------------------------------------------
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